#define POLE_TYPE=node
#define VOLTDUMP=all
#define LOADS=on
#define STARTTIME=2018-03-01 00:00:00 PST
#define STOPTIME=2018-03-01 00:05:00 PST
#define SOLAR=on
//#define STARTRECORDTIME=2018-03-03 00:00:00
